// SBML level 2 version 4

function L_PFK(L, CiATP, KiATP, CAMP, KAMP, CF26BP, KF26BP, CF16BP, KF16BP, AT, AM, F16, F26)
  L*((1 + CiATP*(AT/KiATP))/(1 + AT/KiATP))^2*((1 + CAMP*(AM/KAMP))/(1 + AM/KAMP))^2*((1 + CF26BP*F26/KF26BP + CF16BP*F16/KF16BP)/(1 + F26/KF26BP + F16/KF16BP))^2;
end

function R_PFK(KmF6P, KmATP, g, AT, F6)
  1 + F6/KmF6P + AT/KmATP + g*(F6/KmF6P)*(AT/KmATP);
end

function T_PFK(CATP, KmATP, AT)
  1 + CATP*(AT/KmATP);
end

model Teusink2000_Glycolysis()
  // Can yeast glycolysis be understood in terms of in vitro kinetics of the constituent enzymes? Testing biochemistry.
  // Teusink,B et al.: Eur J Biochem 2000 Sep;267(17):5313-29.
  // The model reproduces the steady-state fluxes and metabolite concentrations of the branched model as given in Table 4 of the paper. It is derived from the model on JWS online, but has the ATP consumption in the succinate branch with the same stoichiometrie as in the publication. The model was successfully tested on copasi v.4.4(build 26).
  // For Vmax values, please note that there is a conversion factor of approx. 270 to convert from U/mg-protein as shown in Table 1 of the paper to mmol/(min*L_cytosol). The equilibrium constant for the ADH reaction in the paper is given for the reverse reaction (Keq = 1.45*10 4 ). The value used in this model is for the forward reaction: 1/Keq = 6.9*10 -5 .
  // Vmax parameters values used (in [mM/min] except VmGLT):
  // VmGLT 97.264 mmol/min
  // VmGLK 226.45
  // VmPGI 339.667
  // VmPFK 182.903
  // VmALD 322.258
  // VmGAPDH_f 1184.52
  // VmGAPDH_r 6549.68
  // VmPGK 1306.45
  // VmPGM 2525.81
  // VmENO 365.806
  // VmPYK 1088.71
  // VmPDC 174.194
  // VmG3PDH 70.15
  // The result of the G6P steady state concentration (marked in red) differs slightly from the one given in table 4. of the publication
  // Results for steady state:
  // orig. article this model
  // Fluxes[mM/min]
  // Glucose 88 88
  // Ethanol 129 129
  // Glycogen 6 6
  // Trehalose 4.8 4.8 (G6P flux through trehalose branch)
  // Glycerol 18.2 18.2
  // Succinate 3.6 3.6
  // Conc.[mM]
  // G6P 1.07 1.03
  // F6P 0.11 0.11
  // F1,6P 0.6 0.6
  // DHAP 0.74 0.74
  // 3PGA 0.36 0.36
  // 2PGA 0.04 0.04
  // PEP 0.07 0.07
  // PYR 8.52 8.52
  // AcAld 0.17 0.17
  // ATP 2.51 2.51
  // ADP 1.29 1.29
  // AMP 0.3 0.3
  // NAD 1.55 1.55
  // NADH 0.04 0.04
  // Authors of the publication also mentioned a few misprints in the original article:
  // in the kinetic law for ADH :
  // the species a should denote NAD and b Ethanol
  // the last term in the equation should read bpq /( K ib K iq K p )
  // in the kinetic law for PFK :
  // R = 1 + λ 1 + λ 2 + g r λ 1 λ 2
  // equation L should read: L = L0*(..) 2 *(..) 2 *(..) 2 not L = L0*(..) 2 *(..) 2 *(..)
  // To make the model easier to curate, the species ATP , ADP and AMP were added. These are calculated via assignment rules from the active phosphate species, P , and the sum of all AXP , SUM_P .
  // To the extent possible under law, all copyright and related or neighbouring rights to this encoded model have been dedicated to the public domain worldwide. Please refer to CC0 Public Domain Dedication for more information.
  // In summary, you are entitled to use this encoded model in absolutely any manner you deem suitable, verbatim, or with modification, alone or embedded it in a larger context, redistribute it, commercially or not, in a restricted way or not.
  // To cite BioModels Database, please use: Li C, Donizelli M, Rodriguez N, Dharuri H, Endler L, Chelliah V, Li L, He E, Henry A, Stefan MI, Snoep JL, Hucka M, Le Novère N, Laibe C (2010) BioModels Database: An enhanced, curated and annotated resource for published quantitative kinetic models. BMC Syst Biol., 4:92.
  // biomodels.db:MODEL6623915522
  // biomodels.db:BIOMD0000000064
  // isDescribedBy pubmed:10951190
  // hasTaxon taxonomy:4932
  // kegg.pathway:sce00010 GO:0006096
  // isHomologTo reactome:REACT_723

  // Compartments:
  compartment extracellular = 1;  // GO:0005576
  compartment cytosol in extracellular = 1;  // GO:0005829

  // Species:
  species GLCi in cytosol = 0.087; GLCi is "Glucose in Cytosol";  // CHEBI:17234 kegg.compound:C00293
  species G6P in cytosol = 2.45; G6P is "Glucose 6 Phosphate";  // CHEBI:17665 kegg.compound:C00668
  species F6P in cytosol = 0.62; F6P is "Fructose 6 Phosphate";  // CHEBI:15946 kegg.compound:C05345
  species F16P in cytosol = 5.51; F16P is "Fructose-1,6 bisphosphate";  // CHEBI:16905 kegg.compound:C00354
  species TRIO in cytosol = 0.96; TRIO is "Triose-phosphate";  // hasPart CHEBI:16108 CHEBI:29052; hasPart kegg.compound:C00118 kegg.compound:C00111 CHEBI:29052
  species BPG in cytosol = 0; BPG is "1,3-bisphosphoglycerate";  // CHEBI:16001 kegg.compound:C00236
  species P3G in cytosol = 0.9; P3G is "3-phosphoglycerate";  // CHEBI:17794 kegg.compound:C00197
  species P2G in cytosol = 0.12; P2G is "2-phosphoglycerate";  // CHEBI:17835 kegg.compound:C00631
  species PEP in cytosol = 0.07; PEP is "Phosphoenolpyruvate";  // kegg.compound:C00074 CHEBI:18021; CHEBI:18021
  species PYR in cytosol = 1.85; PYR is "Pyruvate";  // CHEBI:15361; kegg.compound:C00022 CHEBI:32816
  species ACE in cytosol = 0.17; ACE is "Acetaldehyde";  // CHEBI:15343 kegg.compound:C00084
  species P in cytosol = 6.31; P is "High energy phosphates";  // hasPart kegg.compound:C00008 kegg.compound:C00002 CHEBI:16761; hasPart CHEBI:16761 CHEBI:15422
  species NAD in cytosol = 1.2;  // CHEBI:15846 kegg.compound:C00003
  species NADH in cytosol = 0.39;  // CHEBI:16908 kegg.compound:C00004
  species AMPK_active in cytosol;
  species Glyc in cytosol = 0; Glyc is "Glycogen";  // CHEBI:28087 kegg.compound:C00182
  species Trh in cytosol = 0; Trh is "Trehalose";  // CHEBI:27082 kegg.compound:C01083
  species $CO2 in cytosol = 1;  // CHEBI:16526 kegg.compound:C00011
  species $SUCC in cytosol = 0; SUCC is "Succinate";  // CHEBI:30031
  species $GLCo in extracellular = 50; GLCo is "Extracellular Glucose";  // CHEBI:17234 kegg.compound:C00293
  species $ETOH in cytosol = 5; ETOH is "Ethanol";  // CHEBI:16236 kegg.compound:C00469
  species $GLY in cytosol = 0.15; GLY is "Glycerol";  // CHEBI:17754 kegg.compound:C00116
  species ATP in cytosol = 1.5; ATP is "ATP concentration";  // CHEBI:15422 kegg.compound:C00002
  species ADP in cytosol = 2.1; ADP is "ADP concentration";  // CHEBI:16761 kegg.compound:C00008
  species AMP in cytosol = 0.5; AMP is "AMP concentration";  // CHEBI:16027 kegg.compound:C00020
  species SUM_P in cytosol; SUM_P is "sum of AXP conc";  // hasPart CHEBI:15422 CHEBI:16761 CHEBI:16027; hasPart kegg.compound:C00002 kegg.compound:C00008 kegg.compound:C00020 CHEBI:15422
  species $F26BP in cytosol = 0.02; F26BP is "F2,6P";  // CHEBI:28602 kegg.compound:C00665
  species $Insulin in extracellular = 1;
  species $H2O in cytosol = 55000;

  // Parameters:
  gR = 5.12 dimensionless;
  KmPFKF6P = 0.1 mM;
  KmPFKATP = 0.71 mM;
  Lzero = 0.66 dimensionless;
  CiPFKATP = 100 dimensionless;
  KiPFKATP = 0.65 mM;
  CPFKAMP = 0.0845 dimensionless;
  KPFKAMP = 0.0995 mM;
  CPFKF26BP = 0.0174 dimensionless;
  KPFKF26BP = 0.000682 mM;
  CPFKF16BP = 0.397 dimensionless;
  KPFKF16BP = 0.111 mM;
  CPFKATP = 3 dimensionless;
  KeqAK = 0.45 dimensionless; KeqAK is "AK eq constant";
  KeqTPI = 0.045 dimensionless; KeqTPI is "TPI eq constant";
  toggle_vAK = 1;
  toggle_vATP = 1;
  toggle_vGLK = 1;
  K_AMPK = 1 dimensionless;

  // Assignment rules:
  SUM_P := ATP + ADP + AMP;
  AMPK_active := 1/(1 + ATP/(AMP*K_AMPK));

  // Reactions:
  vGLK: GLCi + ATP -> G6P + ADP; toggle_vGLK*cytosol*VmGLK*(1 - AMPK_active*0.5)*GLCi*ATP*(1/((KmGLKGLCi + GLCi)*(1 + G6P/Ki_G6P))); vGLK is "Hexokinase";  // ec-code:2.7.1.2 kegg.reaction:R00299; isHomologTo reactome:REACT_1318
    VmGLK = 5 mMpermin; KmGLKGLCi = 0.08 mM; KmGLKATP = 0.15 mM; Ki_G6P = 0.2 mM;
  vPGI: G6P -> F6P; cytosol*VmPGI_2/KmPGIG6P_2*(G6P - F6P/KeqPGI_2)/(1 + G6P/KmPGIG6P_2 + F6P/KmPGIF6P_2); vPGI is "Glucose-6-phosphate isomerase";  // ec-code:5.3.1.9 kegg.reaction:R00771; isHomologTo reactome:REACT_116
    VmPGI_2 = 339.677 mMpermin; KmPGIG6P_2 = 1.4 mM; KeqPGI_2 = 0.314 dimensionless; KmPGIF6P_2 = 0.3 mM;
  vGLYCO: G6P + P => Glyc; cytosol*kcat_GLYCO*(G6P/(Km_G6P_GLYCO + G6P))*(P/(Km_P_GLYCO + P)); vGLYCO is "Glycogen synthesis";  // isVersionOf GO:0005978; isHomologTo reactome:REACT_1736
    kcat_GLYCO = 6 mMpermin; Km_G6P_GLYCO = 0.1 mM; Km_P_GLYCO = 0.1 mM;
  vTreha: 2 G6P + P => Trh; cytosol*kcat_TREHA*(G6P/(Km_G6P_TREHA + G6P))*(P/(Km_P_TREHA + P)); vTreha is "Trehalose 6-phosphate synthase";  // isVersionOf GO:0005992
    kcat_TREHA = 2.4 mMpermin; Km_G6P_TREHA = 0.1 mM; Km_P_TREHA = 0.1 mM;
  vPFK: F6P + ATP => F16P + ADP; divide(cytosol*VmPFK*gR*(F6P/KmPFKF6P)*(ATP/(KmPFKATP + ATP))*R_PFK(KmPFKF6P, KmPFKATP, gR, ATP, F6P), R_PFK(KmPFKF6P, KmPFKATP, gR, ATP, F6P)^2 + L_PFK(Lzero, CiPFKATP, KiPFKATP, CPFKAMP, KPFKAMP, CPFKF26BP, KPFKF26BP, CPFKF16BP, KPFKF16BP, ATP, AMP, F16P, F26BP)*T_PFK(CPFKATP, KmPFKATP, ATP)^2, plus, 1)*0.3*AMPK_active; vPFK is "Phosphofructokinase";  // modifiers: AMP, F26BP; ec-code:2.7.1.11 kegg.reaction:R00756; isHomologTo reactome:REACT_736
    VmPFK = 182.903 mMpermin;
  vAK: 2 ADP -> ATP + AMP; toggle_vAK*(kf_AK*ADP^2 - kr_AK*ATP*AMP); vAK is "Adenylate kinase";
    kf_AK = 10 permin; kr_AK = 5 mMpermin;
  vATPsink: ATP + $H2O => ADP + P + H; cytosol*Vm_ATPsink*(ATP/(Km_ATPsink + ATP))*(1/(1 + AMPK_active)); vATPsink is "Generic ATP Consumption";
    Vm_ATPsink = 10 mM_per_min; Km_ATPsink = 0.1 mM;
  vALD: F16P -> 2 TRIO; cytosol*VmALD/KmALDF16P*(F16P - KeqTPI/(1 + KeqTPI)*TRIO*(1/(1 + KeqTPI))*TRIO/KeqALD)/(1 + F16P/KmALDF16P + KeqTPI/(1 + KeqTPI)*TRIO/KmALDGAP + 1/(1 + KeqTPI)*TRIO/KmALDDHAP + KeqTPI/(1 + KeqTPI)*TRIO*(1/(1 + KeqTPI))*TRIO/(KmALDGAP*KmALDDHAP) + F16P*(KeqTPI/(1 + KeqTPI))*TRIO/(KmALDGAPi*KmALDF16P)); vALD is "Aldolase";  // ec-code:4.1.2.13 kegg.reaction:R01070; isHomologTo reactome:REACT_1602
    VmALD = 322.258 mMpermin; KmALDF16P = 0.3 mM; KeqALD = 0.069 dimensionless; KmALDGAP = 2 mM; KmALDDHAP = 2.4 mM; KmALDGAPi = 10 mM;
  vGAPDH: TRIO + NAD -> BPG + NADH; cytosol*(VmGAPDHf*(KeqTPI/(1 + KeqTPI))*TRIO*NAD/(KmGAPDHGAP*KmGAPDHNAD) - VmGAPDHr*BPG*NADH/(KmGAPDHBPG*KmGAPDHNADH))/((1 + KeqTPI/(1 + KeqTPI)*TRIO/KmGAPDHGAP + BPG/KmGAPDHBPG)*(1 + NAD/KmGAPDHNAD + NADH/KmGAPDHNADH)); vGAPDH is "Glyceraldehyde 3-phosphate dehydrogenase";  // ec-code:1.2.1.12 kegg.reaction:R01061; isHomologTo reactome:REACT_1847
    VmGAPDHf = 1184.52 mMpermin; KmGAPDHGAP = 0.21 mM; KmGAPDHNAD = 0.09 mM; VmGAPDHr = 6549.8 mMpermin; KmGAPDHBPG = 0.0098 mM; KmGAPDHNADH = 0.06 mM;
  vPGK: BPG -> P3G + P; cytosol*VmPGK/(KmPGKP3G*KmPGKATP)*(KeqPGK*BPG*ADP - P3G*ATP)/((1 + BPG/KmPGKBPG + P3G/KmPGKP3G)*(1 + ATP/KmPGKATP + ADP/KmPGKADP)); vPGK is "Phosphoglycerate kinase";  // modifiers: ATP, ADP; ec-code:2.7.2.3 kegg.reaction:R01512; isHomologTo reactome:REACT_1771
    VmPGK = 1306.45 mMpermin; KmPGKP3G = 0.53 mM; KmPGKATP = 0.3 mM; KeqPGK = 3200 dimensionless; KmPGKBPG = 0.003 mM; KmPGKADP = 0.2 mM;
  vPGM: P3G -> P2G; cytosol*VmPGM/KmPGMP3G*(P3G - P2G/KeqPGM)/(1 + P3G/KmPGMP3G + P2G/KmPGMP2G); vPGM is "Phosphoglycerate mutase";  // ec-code:5.4.2.1 kegg.reaction:R01518; isHomologTo reactome:REACT_576
    VmPGM = 2525.81 mMpermin; KmPGMP3G = 1.2 mM; KeqPGM = 0.19 dimensionless; KmPGMP2G = 0.08 mM;
  vENO: P2G -> PEP; cytosol*VmENO/KmENOP2G*(P2G - PEP/KeqENO)/(1 + P2G/KmENOP2G + PEP/KmENOPEP); vENO is "Enolase";  // ec-code:4.2.1.11 kegg.reaction:R00658; isHomologTo reactome:REACT_1400
    VmENO = 365.806 mMpermin; KmENOP2G = 0.04 mM; KeqENO = 6.7 dimensionless; KmENOPEP = 0.5 mM;
  vPYK: PEP -> PYR + P; cytosol*VmPYK/(KmPYKPEP*KmPYKADP)*(PEP*ADP - PYR*ATP/KeqPYK)/((1 + PEP/KmPYKPEP + PYR/KmPYKPYR)*(1 + ATP/KmPYKATP + ADP/KmPYKADP)); vPYK is "Pyruvate kinase";  // modifiers: ATP, ADP; ec-code:2.7.1.40 kegg.reaction:R00200; isHomologTo reactome:REACT_1911
    VmPYK = 1088.71 mMpermin; KmPYKPEP = 0.14 mM; KmPYKADP = 0.53 mM; KeqPYK = 6500 dimensionless; KmPYKPYR = 21 mM; KmPYKATP = 1.5 mM;
  vPDC: PYR => ACE + $CO2; cytosol*VmPDC*(PYR^nPDC/KmPDCPYR^nPDC)/(1 + PYR^nPDC/KmPDCPYR^nPDC); vPDC is "Pyruvate decarboxylase";  // ec-code:4.1.1.1 kegg.reaction:R00224
    VmPDC = 174.194 mMpermin; nPDC = 1.9 dimensionless; KmPDCPYR = 4.33 mM;
  vSUC: 2 ACE + 3 NAD + 4 P => 3 NADH + $SUCC; cytosol*KSUCC*(ACE/(Km_ACE_SUCC + ACE))*(NAD/(Km_NAD_SUCC + NAD))*(P/(Km_P_SUCC + P)); vSUC is "Succinate synthesis";  // isVersionOf GO:0006105
    KSUCC = 21.4; Km_ACE_SUCC = 0.1 mM; Km_NAD_SUCC = 0.1 mM; Km_P_SUCC = 0.1 mM;
  vGLT: $GLCo -> GLCi; VmGLT*(Insulin^nGLTInsulin/(Insulin^nGLTInsulin + KGLTInsulin^nGLTInsulin))*(VmGLT/KmGLTGLCo)*(GLCo - GLCi/KeqGLT)/(1 + GLCo/KmGLTGLCo + GLCi/KmGLTGLCi + 0.91*GLCo*GLCi/(KmGLTGLCo*KmGLTGLCi)); vGLT is "Glucose transport";  // modifiers: Insulin; isVersionOf GO:0046323; isHomologTo reactome:REACT_2092
    VmGLT = 97.264 mmolepermin; KmGLTGLCo = 1.1918 mM; KeqGLT = 1 mM; KmGLTGLCi = 1.1918 mM; KGLTInsulin = 0.5 dimensionless; nGLTInsulin = 2 dimensionless;
  vADH: ACE + NADH -> NAD + $ETOH; -cytosol*(VmADH/(KiADHNAD*KmADHETOH)*(NAD*ETOH - NADH*ACE/KeqADH)/(1 + NAD/KiADHNAD + KmADHNAD*ETOH/(KiADHNAD*KmADHETOH) + KmADHNADH*ACE/(KiADHNADH*KmADHACE) + NADH/KiADHNADH + NAD*ETOH/(KiADHNAD*KmADHETOH) + KmADHNADH*NAD*ACE/(KiADHNAD*KiADHNADH*KmADHACE) + KmADHNAD*ETOH*NADH/(KiADHNAD*KmADHETOH*KiADHNADH) + NADH*ACE/(KiADHNADH*KmADHACE) + NAD*ETOH*ACE/(KiADHNAD*KmADHETOH*KiADHACE) + ETOH*NADH*ACE/(KiADHETOH*KiADHNADH*KmADHACE))); vADH is "Alcohol dehydrogenase";  // isHomologTo reactome:REACT_799; isVersionOf ec-code:1.1.1.2 kegg.reaction:R00746
    VmADH = 50 mMpermin; KiADHNAD = 0.92 mM; KmADHETOH = 17 mM; KeqADH = 6.9e-5 dimensionless; KmADHNAD = 0.17 mM; KmADHNADH = 0.11 mM; KiADHNADH = 0.031 mM; KmADHACE = 1.11 mM; KiADHACE = 1.1 mM; KiADHETOH = 90 mM;
  vG3PDH: TRIO + NADH => NAD + $GLY; cytosol*VmG3PDH/(KmG3PDHDHAP*KmG3PDHNADH)*(1/(1 + KeqTPI)*TRIO*NADH - GLY*NAD/KeqG3PDH)/((1 + 1/(1 + KeqTPI)*TRIO/KmG3PDHDHAP + GLY/KmG3PDHGLY)*(1 + NADH/KmG3PDHNADH + NAD/KmG3PDHNAD)); vG3PDH is "Glycerol 3-phosphate dehydrogenase";  // isVersionOf ec-code:1.1.1.8
    VmG3PDH = 70.15 mMpermin; KmG3PDHDHAP = 0.4 mM; KmG3PDHNADH = 0.023 mM; KeqG3PDH = 4300 dimensionless; KmG3PDHGLY = 1 mM; KmG3PDHNAD = 0.93 mM;

  // Unit definitions:
  unit substance = 1e-3 mole; substance is "millimole";
  unit time = 60 second; time is "minute";
  unit mM = 1e-3 mole / litre;
  unit mMpermin = 1e-3 mole / (litre * 60 second);
  unit permin = 1 / (60 second);
  unit mmolepermin = 1e-3 mole / (60 second);
end
