// SBML level 2 version 5

model OxPhos()

  // Compartments:
  compartment cytosol = 1; cytosol is "Cytosol";
  compartment mitochondrion = 1; mitochondrion is "Mitochondrial Matrix";

  // Species:
  species NAD_m in mitochondrion = 1.2; NAD_m is "Nicotinamide Adenine Dinucleotide (oxidized)";
  species NADH_m in mitochondrion = 0.39; NADH_m is "Nicotinamide Adenine Dinucleotide (reduced)";
  species ATP_m in mitochondrion = 1.5; ATP_m is "Adenosine Triphosphate (mitochondrial)";
  species ADP_m in mitochondrion = 2.1; ADP_m is "Adenosine Diphosphate (mitochondrial)";
  species FADH2_m in mitochondrion = 0.05; FADH2_m is "Flavin Adenine Dinucleotide (reduced)";
  species FAD_m in mitochondrion = 0.5; FAD_m is "Flavin Adenine Dinucleotide (oxidized)";
  species ATP in cytosol = 3; ATP is "Adenosine Triphosphate (cytosolic)";
  species ADP in cytosol = 0.7; ADP is "Adenosine Diphosphate (cytosolic)";
  species $O2_m in mitochondrion = 1; O2_m is "Oxygen";
  species $H_m in mitochondrion = 1; H_m is "Proton";
  species $H in cytosol = 1; H is "Proton (cytosolic)";
  species $H2O_m in mitochondrion = 1; H2O_m is "Water";
  species P in cytosol = 5; P is "High energy phosphates";
  species iP_m in mitochondrion = 5; iP_m is "Inorganic Phosphate";
  species ROS_m in mitochondrion = 0.001;

  // Parameters:
  kETC = 30 per_min; kETC is "Electron Transport Chain Rate Constant (NADH)";
  Km_NADH_m = 0.1 mM; Km_NADH_m is "Michaelis Constant for NADH_m in ETC";
  Km_O2_m = 0.1 mM; Km_O2_m is "Michaelis Constant for O2_m in ETC";
  kETC_FADH2 = 30 per_min; kETC_FADH2 is "Electron Transport Chain Rate Constant (FADH2)";
  Km_FADH2_m = 0.1 mM; Km_FADH2_m is "Michaelis Constant for FADH2_m in ETC";
  Km_O2_FADH2 = 0.1 mM; Km_O2_FADH2 is "Michaelis Constant for O2_m with FADH2";
  toggle_ROS_m = 1 dimensionless; toggle_ROS_m is "Toggle for ROS production";

  // Reactions:
  vETC: NADH_m + 0.5 $O2_m + 5 $H_m => NAD_m + $H2O_m + 10 $H; kETC*(NADH_m/(Km_NADH_m + NADH_m))*(O2_m/(Km_O2_m + O2_m)); vETC is "Electron Transport Chain (NADH)";
  vETC_FADH2: FADH2_m + 0.5 $O2_m + 5 $H_m => FAD_m + $H2O_m + 10 $H; kETC_FADH2*(FADH2_m/(Km_FADH2_m + FADH2_m))*(O2_m/(Km_O2_FADH2 + O2_m)); vETC_FADH2 is "Electron Transport Chain (FADH2)";
  vATPsyn: ADP_m + iP_m + 3 $H_m => ATP_m + $H2O_m + 3 $H; Vmax_ATPsyn*(ADP_m/(vATPsyn_Km_ADP_m + ADP_m))*(iP_m/(Km_Pi_m + iP_m))*(H_m/(Km_H_m + H_m)); vATPsyn is "ATP Synthase";
    Vmax_ATPsyn = 12 mM_per_min; vATPsyn_Km_ADP_m = 0.03 mM; Km_Pi_m = 0.2 mM; Km_H_m = 0.1 mM;
  vPiH_symport: P + $H => iP_m + $H_m; Vmax_PiH*(P/(Km_PiH + P))*(H/(Km_H_PiH + H))*(Km_iP_m/(Km_iP_m + iP_m)); vPiH_symport is "Phosphate-H+ Symport";
    Vmax_PiH = 20 mM_per_min; Km_PiH = 0.5 mM; Km_H_PiH = 0.1 mM; Km_iP_m = 10 mM;
  vPi_import: iP_m => P; Vm_Pi_import*(iP_m/(Km_Pi_import + iP_m))*(Km_P/(Km_P + P)); vPi_import is "Cytosolic Pi Import";
    Vm_Pi_import = 1 mM_per_min; Km_Pi_import = 0.1 mM; Km_P = 1 mM;
  vANT: ATP_m + ADP -> ATP + ADP_m; Vmax_ANT*(ATP_m*ADP/(Km_ATP_m + ATP_m + Km_ADP + ADP) - ATP*ADP_m/(Km_ATP + ATP + vANT_Km_ADP_m + ADP_m)); vANT is "Adenine Nucleotide Translocator";
    Vmax_ANT = 5 mM_per_min; Km_ATP_m = 0.05 mM; Km_ADP = 0.05 mM; Km_ATP = 0.05 mM; vANT_Km_ADP_m = 0.05 mM;
  vROS: NADH_m + $O2_m => NAD_m + ROS_m; toggle_ROS_m*leakFactor*kETC*(NADH_m/(Km_NADH_m + NADH_m))*(O2_m/(Km_O2_m + O2_m)); vROS is "ROS Production";
    leakFactor = 0.01 dimensionless;
  vAntioxidants: ROS_m => ; ROS_clearance*ROS_m; vAntioxidants is "ROS Scavenging";
    ROS_clearance = 0.1 per_min;

  // Unit definitions:
  unit mM = 1e-3 mole / litre;
  unit mM_per_min = 1e-3 mole / (litre * 60 second);
  unit per_min = 1 / (60 second);
end
