// SBML level 2 version 4

model PPP()
  // Pentose Phosphate Pathway

  // Compartments:
  compartment cytosol = 1; cytosol is "Cytosol";

  // Species:
  species G6P in cytosol = 2.45; G6P is "Glucose 6 Phosphate";
  species F6P in cytosol = 0.62; F6P is "Fructose 6 Phosphate";
  species TRIO in cytosol = 0.96; TRIO is "Triose-phosphate";
  species $CO2 in cytosol = 1;
  species $H in cytosol = 1; H is "Proton (cytosolic)";
  species P6GL in cytosol = 0; P6GL is "6-Phosphogluconolactone";
  species P6G in cytosol = 0; P6G is "6-Phosphogluconate";
  species Ru5P in cytosol = 0; Ru5P is "Ribulose-5-phosphate";
  species R5P in cytosol = 0; R5P is "Ribose-5-phosphate";
  species X5P in cytosol = 0; X5P is "Xylulose-5-phosphate";
  species S7P in cytosol = 0; S7P is "Sedoheptulose-7-phosphate";
  species E4P in cytosol = 0; E4P is "Erythrose-4-phosphate";
  species NADP in cytosol = 0.1; NADP is "Nicotinamide Adenine Dinucleotide Phosphate (oxidized)";
  species NADPH in cytosol = 0.1; NADPH is "Nicotinamide Adenine Dinucleotide Phosphate (reduced)";

  // Reactions:
  vG6PDH: G6P + NADP => P6GL + NADPH + $H; VmG6PDH*(G6P/(KmG6PDH_G6P + G6P))*(NADP/(KmG6PDH_NADP + NADP)); vG6PDH is "Glucose-6-phosphate Dehydrogenase";
    VmG6PDH = 10 mM_per_min; KmG6PDH_G6P = 0.1 mM; KmG6PDH_NADP = 0.01 mM;
  v6PGLase: P6GL => P6G; k6PGLase*P6GL; v6PGLase is "6-Phosphogluconolactonase";
    k6PGLase = 100 per_min;
  v6PGDH: P6G + NADP => Ru5P + NADPH + $CO2; Vm6PGDH*(P6G/(Km6PGDH_P6G + P6G))*(NADP/(Km6PGDH_NADP + NADP)); v6PGDH is "6-Phosphogluconate Dehydrogenase";
    Vm6PGDH = 10 mM_per_min; Km6PGDH_P6G = 0.1 mM; Km6PGDH_NADP = 0.01 mM;
  vRPI: Ru5P -> R5P; kRPI_f*Ru5P - kRPI_r*R5P; vRPI is "Ribose-5-phosphate Isomerase";
    kRPI_f = 50 per_min; kRPI_r = 50 per_min;
  vRPE: Ru5P -> X5P; kRPE_f*Ru5P - kRPE_r*X5P; vRPE is "Ribulose-5-phosphate Epimerase";
    kRPE_f = 50 per_min; kRPE_r = 50 per_min;
  vTK1: R5P + X5P => S7P + TRIO; VmTK1*(R5P/(KmTK1_R5P + R5P))*(X5P/(KmTK1_X5P + X5P)); vTK1 is "Transketolase 1";
    VmTK1 = 20 mM_per_min; KmTK1_R5P = 0.1 mM; KmTK1_X5P = 0.1 mM;
  vTA: S7P + TRIO => E4P + F6P; VmTA*(S7P/(KmTA_S7P + S7P))*(TRIO/(KmTA_TRIO + TRIO)); vTA is "Transaldolase";
    VmTA = 20 mM_per_min; KmTA_S7P = 0.1 mM; KmTA_TRIO = 0.1 mM;
  vTK2: E4P + X5P => F6P + TRIO; VmTK2*(E4P/(KmTK2_E4P + E4P))*(X5P/(KmTK2_X5P + X5P)); vTK2 is "Transketolase 2";
    VmTK2 = 20 mM_per_min; KmTK2_E4P = 0.1 mM; KmTK2_X5P = 0.1 mM;
end
