// SBML level 2 version 4

model Nazaret2009_TCA_RC_ATP()
  // This a model from the article:
  // Mitochondrial energetic metabolism: a simplified model of TCA cycle with ATP production.
  // Nazaret C, Heiske M, Thurley K, Mazat JP J. Theor. Biol. 2009 Jun;258(3):455-64 19007794 ,
  // Abstract:
  // Mitochondria play a central role in cellular energetic metabolism. The essential parts of this metabolism are the tricarboxylic acid (TCA) cycle, the respiratory chain and the adenosine triphosphate (ATP) synthesis machinery. Here a simplified model of these three metabolic components with a limited set of differential equations is presented. The existence of a steady state is demonstrated and results of numerical simulations are presented. The relevance of a simple model to represent actual in vivo behavior is discussed.
  // biomodels.db:MODEL2594602728
  // biomodels.db:BIOMD0000000232
  // isDescribedBy pubmed:19007794
  // hasTaxon taxonomy:9606
  // hasVersion GO:0006099 GO:0070469 GO:0006754
  // isPartOf reactome:REACT_6305 reactome:REACT_1785 reactome:REACT_2124

  // Compartments:
  compartment cytosol = 1;  // isVersionOf GO:0005737
  compartment mitochondrion = 1; mitochondrion is "mitochondrial matrix";  // isVersionOf GO:0005759

  // Species:
  species $ADP in mitochondrion;  // isVersionOf CHEBI:16761 kegg.compound:C00008
  species ATP in mitochondrion = 3.536;  // isVersionOf CHEBI:15422 kegg.compound:C00002
  species $H in mitochondrion = 1; H is "H+";  // isVersionOf CHEBI:24636 kegg.compound:C00080
  species $He in cytosol = 1; He is "H+";  // isVersionOf CHEBI:24636 kegg.compound:C00080
  species NAD in mitochondrion = 0.856; NAD is "NAD(+)";  // isVersionOf CHEBI:15846 kegg.compound:C00003
  species $NADH in mitochondrion;  // isVersionOf CHEBI:16908 kegg.compound:C00004
  species AcCoA in mitochondrion = 0.063; AcCoA is "acetyl-CoA";  // isVersionOf CHEBI:15351 kegg.compound:C00024
  species KG in mitochondrion = 0.225; KG is "alpha-ketoglutarate";  // isVersionOf CHEBI:16810 kegg.compound:C00026
  species Cit in mitochondrion = 0.44; Cit is "citrate";  // isVersionOf CHEBI:16947 kegg.compound:C00158
  species OAA in mitochondrion = 0.005; OAA is "oxaloacetate";  // isVersionOf CHEBI:16452 kegg.compound:C00036
  species $O2 in mitochondrion = 1; O2 is "oxygen";  // isVersionOf CHEBI:15379 kegg.compound:C00007
  species P in cytosol = 6.31; P is "High energy phosphates";
  species iP in mitochondrion = 2.44; iP is "phosphate";  // isVersionOf CHEBI:18367 kegg.compound:C00009
  species Pyr in mitochondrion = 0.154; Pyr is "pyruvate";  // isVersionOf CHEBI:15361 kegg.compound:C00022
  species $H2O in mitochondrion = 1; H2O is "water";  // isVersionOf CHEBI:15377 kegg.compound:C00001

  // Parameters:
  ATPcrit has mM;
  At = 4.16 mM;
  C = 6.75e-6 mM_per_mV;
  DeltaGtransport has mJ_per_mol;
  DeltaPsi = 150 mV;
  DeltaPsim = 150 mV;
  F = 96485 C_per_mol; F is "Faraday constant";
  JANT has mM_per_s;
  JATP has mM_per_s;
  Jleak has mM_per_s;
  Jresp has mM_per_s;
  K = 2 mM;
  Kapp = 4.4e-9 per_mM;
  Nt = 1.07 mM;
  R = 8314 mJ_per_mol_per_K; R is "gas constant";
  T = 298 kelvin; T is "absolute temperature";
  a = 0.1 per_mV;
  b = 0.004 per_mM;
  kANT = 0.05387 per_s;
  kATP = 131.9 mM_per_s;
  kleak = 0.000426 mM_per_s_per_mV;
  kresp = 2.5 mM_per_s;

  // Assignment rules:
  JANT := kANT*ATP;
  Jleak := kleak*DeltaPsi;
  Jresp := kresp*((Nt - NAD)/(K + Nt - NAD))/(1 + exp(a*(DeltaPsi - DeltaPsim)));
  JATP := kATP*(2/(1 + exp(b*(ATP - ATPcrit))) - 1);
  ATPcrit := At/(1 + exp(-3*DeltaGtransport/(R*T))/(Kapp*iP));
  DeltaGtransport := 1.2*F*DeltaPsi;
  ADP := At - ATP;
  NADH := Nt - NAD;

  // Rate rules:
  DeltaPsi' = (10*Jresp - 3*JATP - Jleak - JANT)/C;

  // Reactions:
  v1: => Pyr; mitochondrion*k1;  // isVersionOf GO:0006848
    k1 = 0.038 mM_per_s;
  v2: Pyr + NAD => AcCoA + $NADH; mitochondrion*k2*Pyr*NAD;  // isVersionOf kegg.reaction:R00209
    k2 = 0.152 per_mM_per_s;
  v3: OAA + AcCoA => Cit; mitochondrion*k3*OAA*AcCoA;  // isVersionOf kegg.reaction:R00351
    k3 = 57.142 per_mM_per_s;
  v4: Cit + NAD => KG + $NADH; mitochondrion*k4*Cit*NAD;  // isVersionOf kegg.reaction:R00709
    k4 = 0.053 per_mM_per_s;
  v5: KG + $ADP + 2 NAD => OAA + ATP + 2 $NADH; mitochondrion*k5*KG*NAD*(At - ATP);  // isVersionOf kegg.reaction:R00355
    k5 = 0.082361 per_mM_squared_per_s;
  v6: OAA -> KG; mitochondrion*k6*(OAA - KG/Keq);  // isVersionOf kegg.reaction:R00355
    k6 = 0.0032 per_s; Keq = 0.3975 dimensionless;
  v7: Pyr + ATP => OAA + $ADP; mitochondrion*k7*Pyr*ATP;  // isVersionOf kegg.reaction:R00344
    k7 = 0.04 per_mM_per_s;
  v8: OAA => ; mitochondrion*k8*OAA;  // isVersionOf GO:0015729
    k8 = 3.6 per_s;
  vresp: $NADH + 0.5 $O2 + 11 $H => NAD + $H2O + 10 $He; mitochondrion*Jresp;  // isVersionOf kegg.reaction:R07171
  vATP: $ADP + iP + 3 $He -> ATP + $H2O + 3 $H; mitochondrion*JATP;  // isVersionOf kegg.reaction:R05227
  vANT: ATP => $ADP; mitochondrion*JANT;  // isVersionOf kegg.reaction:R00086
  vleak: $He => $H; mitochondrion*Jleak;
  vPiH_symport: P + $He -> iP + $H; VmPiSym*(P*He - iP*H/KeqPiH)/((KmP + P)*(KmH + He)); vPiH_symport is "Pi-H symport";
    VmPiSym = 10 mM_per_min; KmP = 1 mM; KmH = 1 mM; KeqPiH = 10 dimensionless;

  // Unit definitions:
  unit substance = 1e-3 mole;
  unit C_per_mol = 10 coulomb / (10 mole); C_per_mol is "coulomb per mole";
  unit mJ_per_mol_per_K = 1e-3 joule / (10 mole * 10 kelvin); mJ_per_mol_per_K is "milliJoule per mole per Kelvin";
  unit mJ_per_mol = 1e-3 joule / (10 mole); mJ_per_mol is "milliJoules per mole";
  unit mM = 1e-3 mole / (10 litre); mM is "millimolar";
  unit mM_per_mV = 1e-3 mole / (10 litre * 1e-3 volt); mM_per_mV is "millimolar per millivolt";
  unit mM_per_s = 1e-3 mole / (10 litre * 10 second); mM_per_s is "millimolar per second";
  unit mM_per_s_per_mV = 1e-3 mole / (10 litre * 10 second * 1e-3 volt); mM_per_s_per_mV is "millimolar per second per millivolt";
  unit mV = 1e-3 volt; mV is "millivolt";
  unit per_mM = 10 litre / (1e-3 mole);
  unit per_mM_per_s = 10 litre / (1e-3 mole * 10 second); per_mM_per_s is "per millimolar per second";
  unit per_mM_squared_per_s = (10 litre)^2 / ((1e-3 mole)^2 * 10 second); per_mM_squared_per_s is "per millimolar squared per second";
  unit per_mV = 1 / (1e-3 volt); per_mV is "per millivolt";
  unit per_s = 1 / (10 second); per_s is "per second";
  unit mM_per_min = 1e-3 mole / (litre * 60 second);
end
